#ifndef PREMAININCLUDES_ANY
#define PREMAININCLUDES_ANY
#path BASE_MODEL_PATH "."


#include "../../../../Body/AAUHuman/ToolBox/Mocap/CreateMarkerClass.any"
#include "../../../../Body/AAUHuman/ToolBox/Mocap/CreateMarkerClassTD.any"
#include "../../../../Body/AAUHuman/ToolBox/Mocap/CreateMarkerClassTDWidgetV2.any"
//#include "ForcePlateGrandChallenge.any"
#include "../../../../Body/AAUHuman/ToolBox/Mocap/ForcePlateType2AutoDetection.any"
#include "../../../../Body/AAUHuman/ToolBox/Mocap/OptimizeAnthropometricsOnOff.any"
#include "KinOptModel\ClassTemplates.any"
//#include "EmgProcessing.any"
#include  "LegTDModel\MomentArmTemplate.any"
//#include "MomentArmTemplate.any"
#include "EmulateC3DMacros.any"


#endif
