#ifndef PREMAININCLUDES_ANY
#include "SetModelType.any"
#endif

Main = {
  AnyProject Project = {
    #include "Data/TrialSelector.any"

    Tasks = {
    #ifdef PREMAININCLUDES_ANY

    #endif

    };
  };
};
